// COMSOL Multiphysics 5.2.0.166 model "Comb Drive Final Project Charles.mph"
// Outline of the model tree

Parameters
  l_finger = 200 [um]
  w_finger = 20 [um]
  l_overlap = 40 [um]
  n_finger = 7
  gap_finger = 20 [um]
  l_stator = 100 [um]
  w_stator = n_finger*w_finger + (n_finger-1)*(gap_finger+w_finger)
  w_spring = 20 [um]
  l_spring = 400 [um]
  thickness = 5 [um]
  F_app = 1e-4 [N]
  frequency = 5000 [Hz]
  density = 8960[kg/m^3]
  E_mat = 120e9[Pa]

Selections
  sel1: Explicit "Comb Right" on boundaries adjacent to domains 17, 19-23
  sel2: Explicit "Comb Left" on boundaries adjacent to domains 2-16, 18

Probes
  dom1: Domain "Domain Probe 1" on domains 8 | expr = u^2; table = tbl1

Geometry
  geom1 "Geometry 1" (3D, length unit m)
    wp1: WorkPlane | unite = on
      r1: Rectangle | pos = {-l_overlap, 0}; base = center; size = {l_finger, w_finger}
      arr1: Array
        input = r1
        size = {1, (n_finger + 1)/2}
        fullsize = {1, (n_finger + 1)/2}
        displ = {0, w_finger * 2 + gap_finger}
      mir1: Mirror | input = arr1; keep = on; axis = {0, 1}
      r2: Rectangle | pos = {-(l_finger/2 + l_overlap) - l_stator/2, 0}; base = center; size = {l_stator, w_stator}
      mir2: Mirror | input = arr1, mir1(2), mir1(3), mir1(4), r2; keep = on
      mov1: Move | input = mir2; disply = -gap_finger*1.5
      r3: Rectangle
        pos = {-w_spring - (l_finger/2 + l_overlap) - l_stator, 0}
        base = center
        size = {w_spring * 2, w_spring}
      r4: Rectangle
        pos = {-w_spring*1.5 - (l_finger/2 + l_overlap) - l_stator, -(l_spring/2 + w_spring/2)}
        base = center
        size = {w_spring, l_spring}
      r5: Rectangle
        pos = {-w_spring*2 - (l_finger/2 + l_overlap) - l_stator, -l_spring - w_spring}
        base = center
        size = {w_spring * 2, w_spring}
      mir3: Mirror | input = r3, r4, r5; keep = on; pos = {-w_spring*3 - (l_finger/2 + l_overlap) - l_stator, 0}
    ext1: Extrude | workplane = wp1; input = wp1; distance = thickness
    blk1: Block "Air" | base = center; size = {l_finger * 4.5, l_spring * 3, thickness * 10}
    fin: Finalize "Form Union"

Materials
  mat1: Common "Cu - Copper" on domains 2-23
    def "Basic"
      electricconductivity = 58.1e6[S/m]
      thermalexpansioncoefficient = 16.5e-6[1/K]
      heatcapacity = 384[J/(kg*K)]
      density = density
      thermalconductivity = 401[W/(m*K)]
      lossfactor = 0.01
    Enu "Young's modulus and Poisson's ratio"
      youngsmodulus = E_mat
      poissonsratio = 0.34
  mat2: Common "Air" on domains 1
    def "Basic"
      relpermeability = 1
      relpermittivity = 1
      dynamicviscosity = eta(T[1/K])[Pa*s]
      ratioofspecificheat = 1.4
      electricconductivity = 0[S/m]
      heatcapacity = Cp(T[1/K])[J/(kg*K)]
      density = rho(pA[1/Pa],T[1/K])[kg/m^3]
      thermalconductivity = k(T[1/K])[W/(m*K)]
      soundspeed = cs(T[1/K])[m/s]
      eta: Piecewise | arg = T; extrap = constant; pieces = {200.0, 1600.0, -8.38278E-7+8.35717342E-8*T^1-7.69429583E-11*T^2+4.6437266E-14*T^3-1.06585607E-17*T^4}
      Cp: Piecewise | arg = T; extrap = constant; pieces = {200.0, 1600.0, 1047.63657-0.372589265*T^1+9.45304214E-4*T^2-6.02409443E-7*T^3+1.2858961E-10*T^4}
      rho: Analytic | expr = pA*0.02897/8.314/T; args = {pA, T}; dermethod = manual; argders = {{pA, d(pA*0.02897/8.314/T,pA)}, {T, d(pA*0.02897/8.314/T,T)}}
      k: Piecewise | arg = T; extrap = constant; pieces = {200.0, 1600.0, -0.00227583562+1.15480022E-4*T^1-7.90252856E-8*T^2+4.11702505E-11*T^3-7.43864331E-15*T^4}
      cs: Analytic | expr = sqrt(1.4*287*T); args = T; dermethod = manual; argders = {T, d(sqrt(1.4*287*T),T)}
    RefractiveIndex
      n = 1
      ki = 0

Physics
  solid: SolidMechanics on domains 2-23
    dependent variable u = {u, v, w}
    lemm1: LinearElasticModel "Linear Elastic Material 1" (default)
    free1: Free (default)
    init1: init "Initial Values 1" (default)
    fix1: Fixed "Fixed Constraint 1" on domains 16-23
    fix2: Fixed "Fixed Constraint 2" on boundaries 6
    bl1: BodyLoad on domains 8 | LoadType = TotalForce; Ftot = {F_app, 0, 0}; FperVol = {F_app * sin(2*pi*freq *t), 0, 0}
    roll1: Roller on boundaries 41, 46, 48, 82, 87, 89, 131
    roll2: Roller on boundaries 9, 18, 31, 35, 43, 50, 56, 60, 62, 68, 74, 80, 86
  es: Electrostatics on domains 1
    dependent variable V
    ccn1: ChargeConservation (default)
    zc1: ZeroCharge (default)
    init1: init "Initial Values 1" (default)
    gnd1: Ground on selection sel1
    term1: Terminal on selection sel2 | TerminalType = Voltage

Mesh
  mesh1 "Mesh 1"
    size: MeshSizeDefault | hmax = 1.2E-4; hmin = 2.16E-5; hcurve = 0.6; hnarrow = 0.5; hgrad = 1.5; hauto = 5
    ftet1: FreeTet "Free Tetrahedral 1" on remaining entities
      size1: Size on entire geometry | hauto = 4

Studies
  std1 "Study 1"
    param: Parametric "Parametric Sweep" | pname = F_app; plistarr = range(0,1,10)
    stat: Stationary
  std2 "Study 2"
    time: Transient "Time Dependent" | tlist = range(0,0.02,3)
  std3 "Study 3"
    opt: Optimization (disabled)
      optsolver = bobyqa
      optobj = (freq - 1e4[Hz])^2
      descr = Eigenfrequency close to 10000 Hz
      initval = {200 [um], 100 [um]}
      scale = {1, 1}
      lbound = {180 [um], 80 [um]}
      ubound = {200 [um], 120[um]}
      pname = {l_finger, l_stator}
    eig: Eigenfrequency | eigmethod = manual; neigs = 2; shift = 10000; appnreigs = 5000; maxnreigs = 15000
  std4 "Study 4"
    freq: Frequency "Frequency Domain" | punit = Hz; plist = range(400000,20000,700000)

Solver configurations
  sol1 "Solution 1" (study std1)
    v1: Variables "Dependent Variables 1"
    s1: Stationary "Stationary Solver 1"
      dDef: Direct
      p1: Parametric | sweeptype = sparse; pname = F_app; plistarr = range(0,1,10); pcontinuationmode = no
      se1: Segregated
        ss1: SegregatedStep | segvar = {comp1_V}; linsolver = i1
        ss2: SegregatedStep | segvar = {comp1_u}; linsolver = dDef
      i1: Iterative | linsolver = cg
        mg1: Multigrid | prefun = amg
  sol2 "Solution 2" (study std2)
    v1: Variables "Dependent Variables 1"
      comp1_u: Field "Displacement field (Material) (comp1.u)" | scalemethod = manual; scaleval = 1e-2*0.000100124921973
    t1: Time "Time-Dependent Solver 1" | tlist = range(0,0.02,3); atolglobalmethod = scaled; atolglobal = 0.001
      dDef: Direct
      se1: Segregated
        ss1: SegregatedStep | segvar = {comp1_V}; linsolver = i1
        ss2: SegregatedStep | segvar = {comp1_u}; linsolver = dDef
      i1: Iterative | linsolver = cg
        mg1: Multigrid | prefun = amg
  sol3 "Solution 3" (study std3)
    v1: Variables "Dependent Variables 1"
    e1: Eigenvalue "Eigenvalue Solver 1"
      d1: Direct
  sol4 "Solution 4" (study std4)
    v1: Variables "Dependent Variables 1"
    s1: Stationary "Stationary Solver 1"
      dDef: Direct
      p1: Parametric | pname = freq; plistarr = range(400000,20000,700000); punit = Hz; pcontinuationmode = no
      se1: Segregated
        ss1: SegregatedStep | segvar = {comp1_V}; linsolver = i1
        ss2: SegregatedStep | segvar = {comp1_u}; linsolver = dDef
      i1: Iterative | linsolver = cg
        mg1: Multigrid | prefun = amg

Datasets
  dset1: Solution | solution = sol1
  dset3: Solution | solution = sol2
  dset4: Solution | solution = sol3
  dset5: Solution | solution = sol4

Tables
  tbl1: Table "Probe Table 1"
    l_finger | l_stator | u^2 (m^2), Domain Probe 1
    0.0002 | 0.0001 | 14.1442
    0.000198 | 0.0001 | 14.0311
    0.0002 | 0.000102 | 14.0122
    0.000196 | 0.0001 | 14.0588
    0.0002 | 9.8e-05 | 14.1028
    0.0002 | 0.00012 | 13.8779
  tbl3: Table "Objective Table 3"
    l_finger | l_stator | Objective
    0.0002 | 0.0001 | 1.28687e+07
    0.000198 | 0.0001 | 1.30671e+07
    0.0002 | 0.000102 | 1.23663e+07
    0.000196 | 0.0001 | 1.32507e+07
    0.0002 | 9.8e-05 | 1.33844e+07
    0.0002 | 0.00012 | 8.60172e+06

Plots
  pg1: PlotGroup3D "Stress (solid)" | data = dset5
    surf1: Surface | expr = solid.disp
      def: Deform "Deformation" | expr = {u, v, w}
  pg2: PlotGroup3D "Electric Potential (es)" | data = dset3
    mslc1: Multislice | expr = V; constUnit = {m, m, m}
  pg3: PlotGroup1D "Probe Plot Group 3"
    tblp1: Table "Probe Table Graph 1" | table = tbl1
  pg4: PlotGroup3D "3D Plot Group 4" | data = dset1
    slc1: Slice
      expr = V
      quickplane = xy
      quickznumber = 1
      quickxnumber = 1
      genpoints = {{0, 0, 0}, {1, 0, 0}, {0, 1, 0}}
  pg7: PlotGroup3D "Stress (solid) 1" | data = dset3
    surf1: Surface | expr = solid.mises
      def: Deform "Deformation" | expr = {u, v, w}
  pg8: PlotGroup3D "Electric Potential (es) 2" | data = dset3
    mslc1: Multislice | expr = V; constUnit = {m, m, m}
  pg9: PlotGroup3D "Mode Shape (solid)" | data = dset4
    surf1: Surface | expr = solid.disp
      def: Deform "Deformation" | expr = {u, v, w}
  pg10: PlotGroup3D "Electric Potential (es) 1" | data = dset4
    mslc1: Multislice | expr = V; constUnit = {m, m, m}
  pg11: PlotGroup3D "Stress (solid) 2" | data = dset5
    surf1: Surface | expr = solid.mises
      def: Deform "Deformation" | expr = {u, v, w}
  pg12: PlotGroup3D "Electric Potential (es) 3" | data = dset5
    mslc1: Multislice | expr = V; constUnit = {m, m, m}